// COMSOL Multiphysics 6.1.0.282 model "Open cavity twinning - Cavità larga - NIM.mph"
// Outline of the model tree

Parameters
  rho0 = 1 [kg/m^3]  // Standard density
  E0 = 1 [Pa]  // Standard Young
  c0 = sqrt(E0/rho0)  // Standard velocity
  L = 1 [m]  // Cell edge
  H = L
  n_eig = 20*1 + 100*0  // Numero di autovalori
  f_ctr = (0.2*1 + 0.005*0)[Hz]  // Searching frequency centre
  a = 3*L
  b = 1.5*a
  delta = 0.5*a
  k_1 = E0/2
  damp = 1e-4
  d = 2*a
  c = sqrt(b*d)

Functions
  an18: Analytic | funcname = f; expr = (delta-b)/(delta-a) * r + delta*(b-a)/(delta-a); args = r; dermethod = manual; argders = {r, df(r)}; fununit = m; argunit = m
  an19: Analytic | funcname = df; expr = (delta-b)/(delta-a); args = r; dermethod = manual; argders = {r, 0}; fununit = 1; argunit = m
  an13: Analytic | funcname = J; expr = r/f(r)/df(r); args = r; fununit = 1; argunit = m
  an14: Analytic "Discrete" | funcname = r_dis; expr = floor( (if(r>delta && r<a,r,0) + if(r<=delta,delta+1e-6,0) + if(r>=a, a-1e-6,0) - delta) /dr)*dr + delta+dr/2; args = r; fununit = m; argunit = m
  an21: Analytic "rho_r" | funcname = rho_r; expr = rho0*df(r)^2 * J(r); args = r; fununit = kg/m^3; argunit = m
  an22: Analytic "rho_t" | funcname = rho_t; expr = rho0*f(r)^2/r^2 * J(r); args = r; fununit = kg/m^3; argunit = m
  an26: Analytic "kkk" | funcname = kkk; expr = E0*J(r); args = r; fununit = Pa; argunit = m
  an20: Analytic "rho_1" | funcname = rho_1; expr = -(sqrt((2*chi*rho_t(r_dis) - rho_t(r_dis) + rho_r(r_dis))^2 - 4*chi^2*rho_t(r_dis)*rho_r(r_dis)) - 2*chi*rho_t(r_dis) + rho_t(r_dis) - rho_r(r_dis) ) / (2*chi); args = r_dis; fununit = kg/m^3; argunit = m
  an23: Analytic "rho_2"
    funcname = rho_2
    expr = -(rho_t(r_dis)*(-sqrt((2*chi*rho_t(r_dis) - rho_t(r_dis) + rho_r(r_dis))^2 - 4*chi^2*rho_t(r_dis)*rho_r(r_dis)) + 2*chi*rho_t(r_dis) - 2*chi*rho_r(r_dis) - rho_t(r_dis) + rho_r(r_dis)))/(sqrt((2*chi*rho_t(r_dis) - rho_t(r_dis) + rho_r(r_dis))^2 - 4*chi^2*rho_t(r_dis)*rho_r(r_dis)) + rho_t(r_dis) - rho_r(r_dis))
    args = r_dis
    fununit = kg/m^3
    argunit = m
  an24: Analytic "Numero strato" | funcname = n_str; expr = if(r-r_dis(r)+dr/2<=chi*dr,1,2); args = r; fununit = m; argunit = m
  an27: Analytic "k_1" | funcname = k_1; expr = kkk(r_dis); args = r_dis; fununit = Pa; argunit = m
  an25: Analytic "k_2" | funcname = k_2; expr = (kkk(r_dis)-chi*k_1(r_dis))/(1-chi); args = r_dis; fununit = Pa; argunit = m
  an28: Analytic "r excess" | funcname = r_exc; expr = r - r_dis(r)+dr/2; args = r; fununit = m; argunit = m

Variables
  var1 "Variables" (disabled)
    pi_pi = integral(acpr_und.p_t*conj(acpr_und.p_t))
    pj_pj = integral(acpr_def.p_t* conj(acpr_def.p_t))
    pk_pk = integral(acpr_clk.p_t* conj(acpr_clk.p_t))
    pi_pk = integral(withsol('sol2',acpr_und.p_t,setind(lambda,i_eig)) * conj(acpr_clk.p_t))
    pl_pl = integral(acpr_dis.p_t* conj(acpr_dis.p_t))
    pi_pl = integral(withsol('sol2',acpr_und.p_t,setind(lambda,i_eig)) * conj(acpr_dis.p_t))
    pi_pi_old = withsol('sol2',integral(acpr_und.p_t*conj(acpr_und.p_t)),setind(lambda,i_eig))
    f_ratio = acpr_clk.freq/f_i_old
    f_i_old = withsol('sol2',acpr_und.freq,setind(lambda,i_eig))
  var2 "Variables 2"
    r_PML_und = (integral(abs(acpr_und.p_t)) /integral(1) ) / (int_PML(abs(acpr_und.p_t)) /int_PML(1))
    r_PML_def = (integral(abs(acpr_def.p_t)) /integral(1) ) / (int_PML(abs(acpr_def.p_t)) / int_PML(1))
    r_PML_clk = (integral(abs(acpr_clk.p_t)) /integral(1) ) / (int_PML(abs(acpr_clk.p_t)) / int_PML(1))

Selections
  sel1: Explicit "Aria" on domains 3, 6-8
  sel2: Explicit on domains 4
  sel3: Explicit "Linea PML" on boundaries 26, 33

Couplings
  intop1: Integration on domains 6-8 | opname = integral
  intop2: Integration on domains 4 | opname = int_PML

Coordinate systems
  sys7: Boundary "Boundary System" | name = sys3
  pml1: PML "Perfectly Matched Layer 1" on domains 4 | ScalingType = Cylindrical; r0 = {0, H}; wavelengthSource = acpr_clk
  sys8: Cylindrical "Cylindrical System" | name = sys2

Geometry
  geom7 "Geometry 7" (2D, length unit m)
    r1: Rectangle | pos = {-L/2, 0}; size = {L, H}
    c1: Circle "Circle amb" | pos = {0, H}; r = L*2; angle = 180
    c2: Circle "Circle PML" | pos = {0, H}; r = L*2*1.6; angle = 180
    c3: Circle "Circle b" | rot = 180; r = b; angle = 180
    c7: Circle "Circle a 1" (disabled)
      rot = 180
      layername = {Layer 1, Layer 2, Layer 1, Layer 2, Layer 1, Layer 2, Layer 1, Layer 2, Layer 1, Layer 2, Layer 1, Layer 2, Layer 1, Layer 2, Layer 1, Layer 2, Layer 1, Layer 2, Layer 1, Layer 2}
      layer = {tt*chi, tt*(1-chi), tt*chi, tt*(1-chi), tt*chi, tt*(1-chi), tt*chi, tt*(1-chi), tt*chi, tt*(1-chi), tt*chi, tt*(1-chi), tt*chi, tt*(1-chi), tt*chi, tt*(1-chi), tt*chi, tt*(1-chi), tt*chi, tt*(1-chi)}
      r = a
      angle = 180
    c4: Circle "Circle a" | rot = 180; r = a; angle = 180
    c8: Circle "Circle delta" | rot = 180; r = delta; angle = 180
    c5: Circle "Circle d" | rot = 180; r = d; angle = 180
    c6: Circle "Circle c" | rot = 180; r = c; angle = 180
    fin: Finalize "Form Union"

Materials
  mat12: Common "Fluid" on domains 1-8
    def "Basic"
      density = rho0
      soundspeed = c0
    PoroacousticsModel
      K_eff = E0

Physics
  acpr_und: PressureAcoustics "Undeformed" on domains 3-8
    dependent variable p1
    PortSweepSettings.ModeShapeNormalization = Power
    cref.cref = c0
    fpam1: FrequencyPressureAcousticsModel "Pressure Acoustics 1" (default)
    shb1: SoundHard "Sound Hard Boundary (Wall)" (default)
    init1: init "Initial Values 1" (default)
  acpr_def: PressureAcoustics "Deformed" on domains 1-8
    dependent variable p2
    PortSweepSettings.ModeShapeNormalization = Power
    cref.cref = c0
    fpam1: FrequencyPressureAcousticsModel "Pressure Acoustics 1" (default)
    shb1: SoundHard "Sound Hard Boundary (Wall)" (default)
    init1: init "Initial Values 1" (default)
  acpr_clk: PressureAcoustics "Cloaked" on domains 1-8
    dependent variable p3
    PortSweepSettings.useSweep = 0
    PortSweepSettings.ModeShapeNormalization = Power
    cref.cref = c0
    fpam1: FrequencyPressureAcousticsModel "Pressure Acoustics 1" (default)
      LinearElasticOption = Krho
      rho_mat = from_mat
      K_eff_mat = from_mat
    shb1: SoundHard "Sound Hard Boundary (Wall)" (default)
    init1: init "Initial Values 1" (default)
    fpam2: FrequencyPressureAcousticsModel "Pressure Acoustics NIM" on domains 1
      FluidModel = FrequencyLinearElastic
      alpha1 = 0.1
      LinearElasticOption = Krho
      rho_mat = userdef
      rho = rho0 *(-1 + i*damp)
      c_mat = userdef
      c = sqrt(E0*((b/2+delta/2)/sys2.r)^4/rho0)
      mu_mat = userdef
      mu = 0
      muB_mat = userdef
      muB = 0
      K_eff_mat = userdef
      K_eff = E0*( -(sys2.r/c)^4 + i*damp)

Mesh
  mesh7 "Mesh"
    size: MeshSizeDefault | hmax = L/7; hmin = 0.002; hcurve = 0.4; custom = on
    map1: Map "Mapped 1" on domains 4
    ftri1: FreeTri "Free Triangular 1" on remaining entities

Studies
  std1 "Study 0"
    eig: Eigenfrequency "Eigenfrq Undeformed"
      neigs = n_eig
      shift = f_ctr
      eigwhich = lr
      linpsolnum = auto
      solve for = {acpr_und}
      mesh = {geom7, mesh7}
    eig2: Eigenfrequency "Eigenfrq Deformed"
      neigs = n_eig
      shift = f_ctr
      eigwhich = lr
      linpmethod = sol
      linpsolnum = auto
      solve for = {acpr_def}
      mesh = {geom7, mesh7}
    eig3: Eigenfrequency "Eigenfrq Cloaked"
      neigs = n_eig
      shift = f_ctr
      eigwhich = lr
      linpmethod = sol
      linpstudy = std1
      linpsolnum = auto
      solve for = {acpr_clk}
      mesh = {geom7, mesh7}
      auxsweepeigvec = preveigvec

Solver configurations
  sol1 "Solution 1" (study std1)
    v1: Variables "Dependent Variables 1"
    e1: Eigenvalue "Eigenvalue Solver 1"
      transform = eigenfrequency
      neigs = n_eig
      shift = f_ctr
      eigref = 100
      eigvfunscale = maximum
      dDef: Direct
    su1: StoreSolution "Solution Store 1"
    v2: Variables "Dependent Variables 2" | initmethod = sol; notsolmethod = sol
    e2: Eigenvalue "Eigenvalue Solver 2"
      transform = eigenfrequency
      neigs = n_eig
      shift = f_ctr
      eigref = 100
      linpmethod = sol
      linpsolnum = auto
      eigvfunscale = maximum
      dDef: Direct
    su2: StoreSolution "Solution Store 2"
    v3: Variables "Dependent Variables 3" | initmethod = sol; notsolmethod = sol
    e3: Eigenvalue "Eigenvalue Solver 3"
      transform = eigenfrequency
      neigs = n_eig
      shift = f_ctr
      eigref = 100
      linpmethod = sol
      linpsolnum = auto
      eigvfunscale = maximum
      dDef: Direct
  sol3 "Solution Store 2" (study std1)
  sol2 "Solution Store 1" (study std1)

Datasets
  dset1: Solution | solution = sol1
  dset2: Solution | solution = sol2
  dset3: Solution | solution = sol3

Derived values
  gevs1: EvalGlobalSweep "Global Evaluation Sweep MAC"
    data = dset1
    table = tbl1
    sweeptype = filled
    pname = {ii, jj}
    plistarr = {range(1,1,n_eig), range(1,1,n_eig)}
    expr = {abs(integral(withsol('sol2',acpr_und.p_t,setind(lambda,ii)) * conj(withsol('sol3',acpr_def.p_t, setind(lambda,jj)))))^2 / integral(withsol('sol2',acpr_und.p_t*conj(acpr_und.p_t),setind(lambda,ii))) / integral(withsol('sol3',acpr_def.p_t*conj(acpr_def.p_t),setind(lambda,jj))), abs(integral(withsol('sol2',acpr_und.p_t,setind(lambda,ii)) * conj(withsol('sol1',acpr_clk.p_t, setind(lambda,jj)))))^2 / integral(withsol('sol2',acpr_und.p_t*conj(acpr_und.p_t),setind(lambda,ii))) / integral(withsol('sol1',acpr_clk.p_t*conj(acpr_clk.p_t),setind(lambda,jj))), withsol('sol2',acpr_und.freq,setind(lambda,ii)), withsol('sol3',acpr_def.freq,setind(lambda,ii)), withsol('sol1',acpr_clk.freq,setind(lambda,ii)), withsol('sol2',r_PML_und,setind(lambda,ii)), withsol('sol3',r_PML_def,setind(lambda,ii)), withsol('sol1',r_PML_clk,setind(lambda,ii))}
    descr = {MAC_und_def, MAC_und_clk, freq_und, freq_def, freq_clk, r_PML_und, r_PML_def, r_PML_clk}
  gev1: EvalGlobal "Global Evaluation 1" | data = dset1; table = tbl2; expr = r_PML_clk
  gevs2: EvalGlobalSweep "Global Evaluation Sweep 2"
    data = dset1
    table = tbl3
    sweeptype = filled
    pname = ii
    plistarr = range(1,1,n_eig)
    expr = {withsol('sol2',r_PML_und,setind(lambda,ii)), withsol('sol3',r_PML_def,setind(lambda,ii)), withsol('sol4',r_PML_clk,setind(lambda,ii)), withsol('sol5',r_PML_dis,setind(lambda,ii)), withsol('sol1',r_PML_lay,setind(lambda,ii))}
    descr = {r_PML_und, r_PML_def, r_PML_clk, r_PML_dis, r_PML_lay}
  gevs3: EvalGlobalSweep "Valutazione densità e bulk lay"
    data = dset1
    table = tbl5
    pname = ii
    plistarr = range(0,1,9)
    expr = {rho_1(a+dr*(0.5+ii)), rho_2(a+dr*(0.5+ii)), k_1(a+dr*(0.5+ii)), k_2(a+dr*(0.5+ii))}

Evaluation groups
  std1EvgFrq: EvaluationGroup "Eigenfrequencies (Study 0)" | data = dset1
    gev1: EvalGlobal "Global Evaluation 1" | expr = {freq*2*pi, imag(freq)/abs(freq), abs(freq)/imag(freq)/2}

Tables
  tbl1: Table "MAC"
    // Global Evaluation Sweep 1
    ii | jj | MAC_und_def | MAC_und_clk | freq_und | freq_def | freq_clk | r_PML_und | r_PML_def | r_PML_clk
    1 | 1 | 6.62457e-09 | 1 | 0.226906+5.68965e-15i | 0.212611+4.30838e-11i | 0.226906+1.32355e-06i | 15119.4 | 2097.71 | 15114.6
    1 | 2 | 3.54381e-09 | 3.96565e-13 | 0.226906+5.68965e-15i | 0.212611+4.30838e-11i | 0.226906+1.32355e-06i | 15119.4 | 2097.71 | 15114.6
    1 | 3 | 5.03521e-08 | 8.59396e-12 | 0.226906+5.68965e-15i | 0.212611+4.30838e-11i | 0.226906+1.32355e-06i | 15119.4 | 2097.71 | 15114.6
    1 | 4 | 8.07031e-13 | 3.53098e-12 | 0.226906+5.68965e-15i | 0.212611+4.30838e-11i | 0.226906+1.32355e-06i | 15119.4 | 2097.71 | 15114.6
    1 | 5 | 4.11316e-13 | 3.7244e-15 | 0.226906+5.68965e-15i | 0.212611+4.30838e-11i | 0.226906+1.32355e-06i | 15119.4 | 2097.71 | 15114.6
    1 | 6 | 1.60548e-10 | 7.63544e-09 | 0.226906+5.68965e-15i | 0.212611+4.30838e-11i | 0.226906+1.32355e-06i | 15119.4 | 2097.71 | 15114.6
    1 | 7 | 8.27936e-12 | 3.83246e-13 | 0.226906+5.68965e-15i | 0.212611+4.30838e-11i | 0.226906+1.32355e-06i | 15119.4 | 2097.71 | 15114.6
    1 | 8 | 0.999823 | 3.24198e-09 | 0.226906+5.68965e-15i | 0.212611+4.30838e-11i | 0.226906+1.32355e-06i | 15119.4 | 2097.71 | 15114.6
    1 | 9 | 1.35427e-09 | 1.0876e-07 | 0.226906+5.68965e-15i | 0.212611+4.30838e-11i | 0.226906+1.32355e-06i | 15119.4 | 2097.71 | 15114.6
    1 | 10 | 7.6962e-09 | 4.23577e-13 | 0.226906+5.68965e-15i | 0.212611+4.30838e-11i | 0.226906+1.32355e-06i | 15119.4 | 2097.71 | 15114.6
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  tbl3: Table
    // Global Evaluation Sweep 2
    ii | r_PML_und | r_PML_def | r_PML_clk | r_PML_dis | r_PML_lay
    1 | 21.7547 | 0.237248 | 21.7547 | 21.7557 | 21.4457
    2 | 0.238015 | 16.8036 | 0.238015 | 0.238011 | 0.237943
    3 | 3.75943 | 1.59695 | 3.75943 | 3.75994 | 3.76467
    4 | 1986.97 | 0.161389 | 1986.97 | 1987.84 | 1957.27
    5 | 1.50364 | 2.86935 | 1.50364 | 1.50332 | 1.49913
    6 | 0.161391 | 1846.83 | 0.161391 | 0.16139 | 0.16139
    7 | 124.572 | 0.11432 | 124.588 | 124.533 | 126.259
    8 | 200.283 | 1.03242 | 200.283 | 200.346 | 200.458
    9 | 14929.7 | 0.0821774 | 14905.4 | 14901.3 | 14889.5
    10 | 0.114316 | 98.629 | 0.114316 | 0.114316 | 0.114316
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  tbl5: Table "Lay properties"
    // Valutazione densità e bulk
    ii | rho_1 | rho_2 | k_1 | k_2
    0 | 0.457006 | 2.18816 | 0.330645 | 0.330645
    1 | 0.467633 | 2.13843 | 0.325758 | 0.325758
    2 | 0.477592 | 2.09384 | 0.321429 | 0.321429
    3 | 0.486953 | 2.05359 | 0.317568 | 0.317568
    4 | 0.495775 | 2.01705 | 0.314103 | 0.314103
    5 | 0.50411 | 1.9837 | 0.310976 | 0.310976
    6 | 0.512003 | 1.95311 | 0.30814 | 0.30814
    7 | 0.519494 | 1.92495 | 0.305556 | 0.305556
    8 | 0.526616 | 1.89892 | 0.303191 | 0.303191
    9 | 0.533401 | 1.87476 | 0.30102 | 0.30102

Plots
  pg10: PlotGroup2D "Undeformed pressure" | data = dset2; title = f = eval(freq,Hz) Hz
    surf1: Surface | expr = abs(acpr_und.p_t)
    con1: Contour (disabled) | expr = acpr_und.p_t; levelmethod = levels; levels = range(-2.5,0.2,2.5)
  pg12: PlotGroup2D "Deformed pressure" | data = dset3
    surf1: Surface | expr = abs(acpr_def.p_t)
    con1: Contour (disabled) | expr = acpr_def.p_t; levelmethod = levels; levels = range(-2.5,0.2,2.5)
  pg20: PlotGroup2D "Cloaked pressure" | data = dset1; title = f = eval(acpr_und.freq) Hz
    surf1: Surface | expr = abs(acpr_clk.p_t)
    con1: Contour (disabled) | expr = acpr_clk.p_t
  pg17: PlotGroup2D "Cloak rho" | data = dset1
    surf1: Surface "Surf" | data = dset3; expr = acpr_clk.rho_effyy; descr = rho_xx
  pg24: PlotGroup2D "Cloak kappa" | data = dset1
    surf1: Surface "Surf" | data = dset3; expr = acpr_clk.K_eff; descr = rho_xx
  pg21: PlotGroup2D "MAC" | data = dset1; title = \delta = eval(damp)
    tbls1: TableSurface
      table = tbl1
      dataformat = columns
      coly = 2
      coldata = 4
      preprocdata = linear
      scalingdata = -1
      shiftdata = +1
      title = eval(damp)
      function = discrete

Exports
  anim1: Animation "Undeformed" | type = imageseq; framesel = all; width = 500; height = 500
  anim2: Animation "Cloaked" | type = imageseq; framesel = all; width = 500; height = 500