// COMSOL Multiphysics 6.1.0.282 model "Open cavity twinning - Metasurface 2.mph"
// Outline of the model tree

Parameters
  L = 1 [m]  // Cell edge
  rho0 = 1 [kg/m^3]  // Standard density
  E0 = 1 [Pa]  // Standard Young
  c0 = sqrt(E0/rho0)  // Standard velocity
  n_eig = 20  // Numero di autovalori
  f_ctr = 0.1[Hz]  // Searching frequency centre
  dx = L/10
  dy = dx
  H1 = L/2
  H2 = L/2
  H3 = 2*L
  H_PML = L*2
  xA = -(H1+H2)*sin(alpha)
  xB = -H1*sin(alpha)
  xC = sqrt(L^2+H1^2)*sin(alphap)
  xD = sqrt(L^2+(H1+H2)^2)*sin(alphapp)
  alpha = atan(L/H1)/2
  alphap = atan(L/H1) - alpha
  alphapp = atan(L/(H1+H2)) - alpha
  kx = k*cos(alpha)
  ky = k*sin(alpha)
  k = 0 [rad/m]
  k_min = 0
  k_max = pi[rad]/L
  dk = (k_max - k_min)/20

Functions
  pw1: Piecewise "y0" | funcname = y0; pieces = {{xA, 0, tan(alpha+pi/2)*x}, {0, xC, tan(pi/2-alphap)*x}}; argunit = m; fununit = m
  pw2: Piecewise "dy0" | funcname = dy0; pieces = {{xA, 0, tan(alpha+pi/2)}, {0, xC, tan(pi/2-alphap)}}; argunit = m; fununit = 1
  pw3: Piecewise "y1" | funcname = y1; pieces = {{xA, xB, tan(pi/2+alpha)*x}, {xB, xC, tan(alpha)*x + H1/cos(alpha)}}; argunit = m; fununit = m
  pw6: Piecewise "dy1" | funcname = dy1; pieces = {{xA, xB, tan(pi/2+alpha)}, {xB, xC, tan(alpha)}}; argunit = m; fununit = 1
  pw4: Piecewise "y2" | funcname = y2; pieces = {{xA, xD, tan(alpha)*x + (H1+H2)/cos(alpha)}, {xD, xC, tan(alpha-pi/2)*x + L/sin(alpha)}}; argunit = m; fununit = m
  pw7: Piecewise "dy2" | funcname = dy2; smoothzone = 0.001; pieces = {{xA, xD, tan(alpha)}, {xD, xC, tan(alpha-pi/2)}}; argunit = m; fununit = 1
  an3: Analytic | funcname = alpha; expr = (y2(X)-y1(X)) / (y2(X)-y0(X)); args = X; dermethod = manual; argders = {X, dalpha(X)}; fununit = 1; argunit = m
  an11: Analytic | funcname = dalpha; expr = ((dy2(X)-dy1(X)) * (y2(X)-y0(X)) - (y2(X)-y1(X))*(dy2(X)-dy0(X))) / (y2(X)-y0(X))^2; args = X; fununit = 1/m; argunit = m
  an4: Analytic | funcname = beta; expr = y1(X) - y0(X)*alpha(X); args = X; dermethod = manual; argders = {X, dbeta(X)}; fununit = m; argunit = m
  an12: Analytic | funcname = dbeta; expr = dy1(X) - dy0(X)*alpha(X) - y0(X)*dalpha(X); args = X; fununit = 1; argunit = m
  an13: Analytic | funcname = J; expr = alpha(X); args = {X, Y}; fununit = 1; argunit = {m, m}
  an20: Analytic | funcname = X; expr = u; args = {u, v}; fununit = m; argunit = {m, m}
  an21: Analytic | funcname = Y; expr = (v-beta(X(u,v))) / alpha(X(u,v)); args = {u, v}; fununit = m; argunit = {m, m}
  an14: Analytic | funcname = x_dis; expr = floor( (if(x>0 && x<L,x,0) + if(x<=0,1e-3,0) + if(x>=L, L-1e-3,0)) /dx)*dx+dx/2; fununit = m; argunit = m
  an15: Analytic | funcname = y_dis; expr = H1 + floor((y-H1)/dy)*dy + dy/2; args = y; fununit = m; argunit = m
  an24: Analytic | funcname = x_r; expr = x*cos(alphap) + y*sin(alphap); args = {x, y}
  an25: Analytic | funcname = y_r; expr = -x*sin(alphap) + y*cos(alphap); args = {x, y}
  an26: Analytic | funcname = x_ar; expr = x_r*cos(alphap) - y_r*sin(alphap); args = {x_r, y_r}
  an27: Analytic | funcname = y_ar; expr = x*sin(alphap) + y*cos(alphap); args = {x, y}
  an22: Analytic | funcname = X_dis; expr = X(x_ar(x_dis(x_r(u,v)), y_dis(y_r(u,v))), y_ar(x_dis(x_r(u,v)),y_dis(y_r(u,v)))); args = {u, v}; fununit = m; argunit = {m, m}
  an23: Analytic | funcname = Y_dis; expr = Y(x_ar(x_dis(x_r(u,v)), y_dis(y_r(u,v))), y_ar(x_dis(x_r(u,v)),y_dis(y_r(u,v)))); args = {u, v}; fununit = m; argunit = {m, m}

Variables
  var1 "Variables 1"
    r_PML_und = integral_PML(abs(acpr_und.p_t))/integral(abs(acpr_und.p_t))  // Ratio PML und
    r_PML_clk = integral_PML(abs(acpr_clk.p_t))/integral(abs(acpr_clk.p_t))  // Ratio PML clk

Couplings
  intop1: Integration on domains 2 | opname = integral
  intop2: Integration "Integration PML" on domains 1 | opname = integral_PML

Coordinate systems
  sys7: Boundary "Boundary System 7"
  pml1: PML "Perfectly Matched Layer 1" on domains 1

Geometry
  geom7 "Geometry 7" (2D, length unit m)
    r1: Rectangle | rot = alpha; size = {L, H1+H2+H3}
    pc3: ParametricCurve "Y0" | parmax = xC; coord = {s, y0(s)}
    pc1: ParametricCurve "Y1" | parmin = xB; parmax = xC; coord = {s, y1(s)}
    pc2: ParametricCurve "Y2" | parmin = xA; parmax = xD; coord = {s, y2(s)}
    pard1: PartitionDomains
      domain = r1(1) domains 1
      partitionwith = edges
      edge = pc2(1) boundaries 1; pc3(1) boundaries 1; pc1(1) boundaries 1
    del1: Delete "Delete Entities 1" | input = pard1(1) domains 4
    pare1: PartitionEdges (disabled) | edge = del1(1) 1; param = (y0(L)-q0)/(y1(0)-q0)
    r3: Rectangle | pos = {-sin(alpha)*(H1+H2+H3), cos(alpha)*(H1+H2+H3)}; rot = alpha; size = {L, H_PML}
    fin: Finalize "Form Union"

Materials
  mat12: Common "Fluid" on all domains
    def "Basic"
      density = rho0
      soundspeed = c0
  mat13: Common "Anisotropic fluid" (disabled) on domains 3, 4
    def "Basic" (disabled)
      density = rho0
      soundspeed = c0
    AnisotropicAcousticsModel (disabled)
      rho_eff = {((dalpha(x)*y+dbeta(x))^2+alpha(x)^2)*rho0/J(x,y), (-dalpha(x)*y-dbeta(x))*rho0/J(x,y), 0, (-dalpha(x)*y-dbeta(x))*rho0/J(x,y), 1*rho0/J(x,y), 0, 0, 0, 1*rho0/J(x,y)}
      K_eff = E0*J(x,y)
  mat14: Common "Anisotropic fluid dis" (disabled) on domains 3, 4
    def "Basic"
      density = rho0
      soundspeed = c0
    AnisotropicAcousticsModel
      rho_eff = {((dalpha(x_dis(x))*y_dis(x)+dbeta(x_dis(x)))^2+alpha(x_dis(x))^2)*rho0/J(x_dis(x),y_dis(x)), (-dalpha(x_dis(x))*y_dis(x)-dbeta(x_dis(x)))*rho0/J(x_dis(x),y_dis(x)), 0, (-dalpha(x_dis(x))*y_dis(x)-dbeta(x_dis(x)))*rho0/J(x_dis(x),y_dis(x)), 1*rho0/J(x_dis(x),y_dis(x)), 0, 0, 0, 1*rho0/J(x_dis(x),y_dis(x))}
      K_eff = E0*J(x_dis(x),y_dis(x))

Physics
  acpr_und: PressureAcoustics "Undeformed" on all domains
    dependent variable p1
    ShapeProperty.order_pressure = 2s
    PortSweepSettings.ModeShapeNormalization = Power
    cref.cref = c0
    fpam1: FrequencyPressureAcousticsModel "Pressure Acoustics 1" (default)
    shb1: SoundHard "Sound Hard Boundary (Wall)" (default)
    init1: init "Initial Values 1" (default)
    pc1: PeriodicCondition on boundaries 2, 3, 5-7, 9
      PeriodicType = Floquet
      kFloquet = {kx, ky, 0}
      destinationDomains: boundaries 3, 6, 9
  acpr_clk: PressureAcoustics "Cloaked" on domains 1-3
    dependent variable p3
    ShapeProperty.order_pressure = 2s
    PortSweepSettings.ModeShapeNormalization = Power
    cref.cref = c0
    fpam1: FrequencyPressureAcousticsModel "Pressure Acoustics 1" (default)
    shb1: SoundHard "Sound Hard Boundary (Wall)" (default)
    init1: init "Initial Values 1" (default)
    aam1: AnisotropicAcousticsModel "Anisotropic Acoustics" on domains 3
      K_eff_mat = userdef
      K_eff = E0*J(X(x,y),Y(x,y))
      rho_eff_mat = userdef
      rho_eff = {((dalpha(X(x,y))*Y(x,y)+dbeta(X(x,y)))^2+alpha(X(x,y))^2) * rho0/J(X(x,y),Y(x,y)), (-dalpha(X(x,y))*Y(x,y)-dbeta(X(x,y)) ) * rho0/J(X(x,y),Y(x,y)), 0, (-dalpha(X(x,y))*Y(x,y)-dbeta(X(x,y)) ) * rho0/J(X(x,y),Y(x,y)), rho0/J(X(x,y),Y(x,y)), 0, 0, 0, rho0/J(X(x,y),Y(x,y))}
    pc2: PeriodicCondition on boundaries 2, 3, 5-7, 9
      PeriodicType = Floquet
      kFloquet = {kx, ky, 0}
      destinationDomains: boundaries 3, 6, 9
  acpr_dis: PressureAcoustics "Cloaked dis" on domains 1-3
    dependent variable p4
    PortSweepSettings.ModeShapeNormalization = Power
    cref.cref = c0
    fpam1: FrequencyPressureAcousticsModel "Pressure Acoustics 1" (default)
    shb1: SoundHard "Sound Hard Boundary (Wall) 1" (default)
    init1: init "Initial Values 1" (default)
    aam1: AnisotropicAcousticsModel "Anisotropic Acoustics" on domains 3
      K_eff_mat = userdef
      K_eff = E0*J(X_dis(x,y),Y_dis(x,y))
      rho_eff_mat = userdef
      rho_eff = {((dalpha(X_dis(x,y))*Y_dis(x,y)+dbeta(X_dis(x,y)))^2+alpha(X_dis(x,y))^2)*rho0/J(X_dis(x,y),Y_dis(x,y)), (-dalpha(X_dis(x,y))*Y_dis(x,y)-dbeta(X_dis(x,y)))*rho0/J(X_dis(x,y),Y_dis(x,y)), 0, (-dalpha(X_dis(x,y))*Y_dis(x,y)-dbeta(X_dis(x,y)))*rho0/J(X_dis(x,y),Y_dis(x,y)), 1*rho0/J(X_dis(x,y),Y_dis(x,y)), 0, 0, 0, 1*rho0/J(X_dis(x,y),Y_dis(x,y))}
    pc3: PeriodicCondition on boundaries 2, 3, 5-9
      PeriodicType = Floquet
      kFloquet = {kx, ky, 0}
      destinationDomains: boundaries 3, 6, 9

Mesh
  mesh7 "Mesh"
    size: MeshSizeDefault | hmax = 0.08*L; hmin = 0.0012; custom = on
    size1: Size on domains 3 | hmax = min(dx,dy)/6; hauto = 3; custom = on
    map1: Map "Mapped 1" on domains 1
    ftri1: FreeTri "Free Triangular 1" on remaining entities

Studies
  std1 "Study undeformed"
    param: Parametric "Parametric Sweep" | pname = k; plistarr = range(k_min,dk,k_max); punit = rad/m
    eig: Eigenfrequency "Eigenfrq Undeformed" | neigs = n_eig+5; shift = f_ctr; linpsolnum = auto; solve for = {acpr_und}
  std2 "Study cloaked"
    param1: Parametric "Parametric Sweep 1" | pname = k; plistarr = range(k_min,dk,k_max); punit = rad/m
    eig3: Eigenfrequency "Eigenrfq Cloaked" | neigs = n_eig+5; shift = f_ctr; linpsolnum = auto
  std3 "Study comparison"
    eig2: Eigenfrequency "Eigenfrq Undeformed"
      neigs = n_eig
      shift = f_ctr
      conrad = 1
      linpsolnum = auto
      solve for = {acpr_und}
    eig: Eigenfrequency "Eigenfrq Ideal"
      neigs = n_eig
      shift = f_ctr
      conrad = 1
      linpsolnum = auto
      solve for = {acpr_clk}
    eig1: Eigenfrequency "Eigenfrq Discrete"
      neigs = n_eig
      shift = f_ctr
      conrad = 1
      linpsolnum = auto
      solve for = {acpr_dis}

Solver configurations
  sol1 "Solution 1" (study std1)
    v1: Variables "Dependent Variables 1"
    e1: Eigenvalue "Eigenvalue Solver 1" | transform = eigenfrequency; neigs = n_eig+5; shift = f_ctr; eigref = 100
      dDef: Direct
  sol5 "Parametric Solutions 1" (study std1)
  sol27 "Solution 27" (study std2)
    // same settings as sol1
  sol28 "Parametric Solutions 2" (study std2)
  sol134 "Solution 134" (study std3)
    v1: Variables "Dependent Variables 1"
    e1: Eigenvalue "Eigenvalue Solver 1" | transform = eigenfrequency; neigs = n_eig; shift = f_ctr; eigref = 100
      dDef: Direct
    su1: StoreSolution "Solution Store 1"
    v2: Variables "Dependent Variables 2" | initmethod = sol; notsolmethod = sol
    e2: Eigenvalue "Eigenvalue Solver 2"
      transform = eigenfrequency
      neigs = n_eig
      shift = f_ctr
      eigref = 100
      linpmethod = sol
      linpsolnum = auto
      dDef: Direct
    su2: StoreSolution "Solution Store 2"
    v3: Variables "Dependent Variables 3" | initmethod = sol; notsolmethod = sol
    e3: Eigenvalue "Eigenvalue Solver 3"
      transform = eigenfrequency
      neigs = n_eig
      shift = f_ctr
      eigref = 100
      linpmethod = sol
      linpsolnum = auto
      dDef: Direct
  sol135 "Solution Store 1" (study std3)
  sol136 "Solution Store 2" (study std3)

Datasets
  dset1: Solution | solution = sol1
  dset5: Solution | solution = sol5
  dset6: Solution | solution = sol27
  dset7: Solution | solution = sol28
  tran1: Transformation2D | data = dset6; enablerot = on; rotangle = -alphap
  dset8: Solution | solution = sol134
  dset9: Solution | solution = sol135
  dset10: Solution | solution = sol136
  tran2: Transformation2D | data = dset8; enablerot = on; rotangle = -alphap

Derived values
  gevs2: EvalGlobalSweep "Global Evaluation Sweep"
    data = dset1
    table = tbl4
    sweeptype = filled
    pname = {ii, jj}
    plistarr = {range(1,1,n_eig), range(1,1,n_eig)}
    expr = {abs(integral(withsol('sol135',acpr_und.p_t,setind(lambda,ii)) * conj(withsol('sol136',acpr_clk.p_t, setind(lambda,jj)))))^2 / integral(withsol('sol135',acpr_und.p_t*conj(acpr_und.p_t),setind(lambda,ii))) / integral(withsol('sol136',acpr_clk.p_t*conj(acpr_clk.p_t),setind(lambda,jj))), abs(integral(withsol('sol135',acpr_und.p_t,setind(lambda,ii)) * conj(withsol('sol134',acpr_dis.p_t, setind(lambda,jj)))))^2 / integral(withsol('sol135',acpr_und.p_t*conj(acpr_und.p_t),setind(lambda,ii))) / integral(withsol('sol134',acpr_dis.p_t*conj(acpr_dis.p_t),setind(lambda,jj))), withsol('sol135',acpr_und.freq,setind(lambda,ii)), withsol('sol136',acpr_clk.freq,setind(lambda,ii)), withsol('sol134',acpr_dis.freq,setind(lambda,ii))}
    descr = {MAC_und_clk, MAC_und_dis, freq_und, freq_clk, freq_dis}
  gev1: EvalGlobal "Dispersion Cloaked" | data = dset7; table = tbl1; expr = {acpr_clk.freq, r_PML_clk}
  gev2: EvalGlobal "Dispersion Undeformed" | data = dset5; table = tbl2; expr = {acpr_und.freq, r_PML_und}

Evaluation groups
  std2EvgFrq: EvaluationGroup "Eigenfrequencies (Study cloaked)" | data = dset7
    gev1: EvalGlobal "Global Evaluation 1"
      expr = {freq*2*pi, imag(freq)/abs(freq), abs(freq)/imag(freq)/2}
      unit = {rad/s, 1, 1}
      descr = {Angular frequency, Damping ratio, Quality factor}
  std3EvgFrq: EvaluationGroup "Eigenfrequencies (Study comparison)" | data = dset8
    gev1: EvalGlobal "Global Evaluation 1"
      expr = {freq*2*pi, imag(freq)/abs(freq), abs(freq)/imag(freq)/2}
      unit = {rad/s, 1, 1}
      descr = {Angular frequency, Damping ratio, Quality factor}

Tables
  tbl1: Table "Dispersion Cloacked"
    // Global Evaluation 1
    k (rad/m) | Eigenfrequency (Hz) | Frequency (Hz) | r_PML_clk (1)
    0 | 3.25058e-07-2.212e-06i | 3.25058e-07-2.212e-06i | 1
    0 | 0.089413+0.0376107i | 0.089413+0.0376107i | 1.07305
    0 | 0.178843+0.0749939i | 0.178843+0.0749939i | 0.949023
    0 | 0.268365+0.111876i | 0.268365+0.111876i | 0.839006
    0 | 0.35821+0.147904i | 0.35821+0.147904i | 0.7797
    0 | 0.448886+0.182591i | 0.448886+0.182591i | 0.736884
    0 | 0.542682+0.216068i | 0.542682+0.216068i | 0.697478
    0 | 0.635752+0.246217i | 0.635752+0.246217i | 0.657572
    0 | 0.698957+0.148498i | 0.698957+0.148498i | 0.318905
    0 | 0.727749+0.32915i | 0.727749+0.32915i | 0.834223
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  tbl2: Table "Dispersion Undeformed"
    k (rad/m) | Eigenfrequency (Hz) | Frequency (Hz) | Ratio PML und (1)
    0 | 3.13086e-07-2.38088e-06i | 3.13086e-07-2.38088e-06i | 1
    0 | 0.089413+0.0376084i | 0.089413+0.0376084i | 1.07306
    0 | 0.178843+0.0749759i | 0.178843+0.0749759i | 0.948798
    0 | 0.268361+0.111819i | 0.268361+0.111819i | 0.838539
    0 | 0.358197+0.147778i | 0.358197+0.147778i | 0.778902
    0 | 0.448866+0.182374i | 0.448866+0.182374i | 0.735766
    0 | 0.542714+0.215767i | 0.542714+0.215767i | 0.696038
    0 | 0.635904+0.246066i | 0.635904+0.246066i | 0.656733
    0 | 0.695424+0.147768i | 0.695424+0.147768i | 0.319489
    0 | 0.727707+0.329144i | 0.727707+0.329144i | 0.834284
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  tbl4: Table
    // Global Evaluation Sweep
    ii | jj | MAC_und_clk | MAC_und_dis | freq_und | freq_clk | freq_dis
    1 | 1 | 1 | 1 | 3.13046e-07-2.38093e-06i | 3.25037e-07-2.21212e-06i | 3.64869e-07-2.28996e-06i
    1 | 2 | 0.811258 | 0.811293 | 3.13046e-07-2.38093e-06i | 3.25037e-07-2.21212e-06i | 3.64869e-07-2.28996e-06i
    1 | 3 | 0.495334 | 0.494547 | 3.13046e-07-2.38093e-06i | 3.25037e-07-2.21212e-06i | 3.64869e-07-2.28996e-06i
    1 | 4 | 0.398615 | 0.399194 | 3.13046e-07-2.38093e-06i | 3.25037e-07-2.21212e-06i | 3.64869e-07-2.28996e-06i
    1 | 5 | 0.174288 | 0.175016 | 3.13046e-07-2.38093e-06i | 3.25037e-07-2.21212e-06i | 3.64869e-07-2.28996e-06i
    1 | 6 | 0.103668 | 0.104523 | 3.13046e-07-2.38093e-06i | 3.25037e-07-2.21212e-06i | 3.64869e-07-2.28996e-06i
    1 | 7 | 0.0906982 | 0.0920523 | 3.13046e-07-2.38093e-06i | 3.25037e-07-2.21212e-06i | 3.64869e-07-2.28996e-06i
    1 | 8 | 0.0858243 | 0.086539 | 3.13046e-07-2.38093e-06i | 3.25037e-07-2.21212e-06i | 3.64869e-07-2.28996e-06i
    1 | 9 | 0.060315 | 0.0609875 | 3.13046e-07-2.38093e-06i | 3.25037e-07-2.21212e-06i | 3.64869e-07-2.28996e-06i
    1 | 10 | 0.0846518 | 0.0848975 | 3.13046e-07-2.38093e-06i | 3.25037e-07-2.21212e-06i | 3.64869e-07-2.28996e-06i
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
Plots
  pg36: PlotGroup2D "Cloak dis rhoxx" on domains 3, 4 | data = tran2
    surf1: Surface
      expr = cos(alphap)*(acpr_dis.rho_effxx*cos(alphap) + acpr_dis.rho_effyx*sin(alphap)) + sin(alphap)*(acpr_dis.rho_effxy*cos(alphap) + acpr_dis.rho_effyy*sin(alphap))
  pg37: PlotGroup2D "Cloak dis rhoxy" on domains 3, 4 | data = tran2
    surf1: Surface
      expr = cos(alphap)*(acpr_dis.rho_effxy*cos(alphap) + acpr_dis.rho_effyy*sin(alphap)) - sin(alphap)*(acpr_dis.rho_effxx*cos(alphap) + acpr_dis.rho_effyx*sin(alphap))
  pg38: PlotGroup2D "Cloak dis rhoyx" on domains 3, 4 | data = tran2
    surf1: Surface
      expr = cos(alphap)*(acpr_dis.rho_effyx*cos(alphap) - acpr_dis.rho_effxx*sin(alphap)) + sin(alphap)*(acpr_dis.rho_effyy*cos(alphap) - acpr_dis.rho_effxy*sin(alphap))
  pg39: PlotGroup2D "Cloak dis rhoyy" on domains 3, 4 | data = tran2
    surf1: Surface
      expr = cos(alphap)*(acpr_dis.rho_effyy*cos(alphap) - acpr_dis.rho_effxy*sin(alphap)) - sin(alphap)*(acpr_dis.rho_effyx*cos(alphap) - acpr_dis.rho_effxx*sin(alphap))
  pg40: PlotGroup2D "Cloak dis k" on domains 3, 4 | data = tran2
    surf1: Surface | expr = acpr_dis.K_eff; descr = Effective bulk modulus
  pg19: PlotGroup2D "Cloaked dis pressure" | data = dset8; title = f = eval(acpr_und.freq) Hz
    surf1: Surface | expr = abs(acpr_dis.p_t)
    con1: Contour (disabled) | expr = acpr_clk.p_t
  pg18: PlotGroup2D "Cloak ide rhoxx" on domains 3, 4 | data = tran1
    surf1: Surface
      expr = cos(alphap)*(acpr_clk.rho_effxx*cos(alphap) + acpr_clk.rho_effyx*sin(alphap)) + sin(alphap)*(acpr_clk.rho_effxy*cos(alphap) + acpr_clk.rho_effyy*sin(alphap))
  pg26: PlotGroup2D "Cloak ide rhoxy" on domains 3, 4 | data = tran1
    surf1: Surface
      expr = cos(alphap)*(acpr_clk.rho_effxy*cos(alphap) + acpr_clk.rho_effyy*sin(alphap)) - sin(alphap)*(acpr_clk.rho_effxx*cos(alphap) + acpr_clk.rho_effyx*sin(alphap))
  pg27: PlotGroup2D "Cloak ide rhoyx" on domains 3, 4 | data = tran1
    surf1: Surface
      expr = cos(alphap)*(acpr_clk.rho_effyx*cos(alphap) - acpr_clk.rho_effxx*sin(alphap)) + sin(alphap)*(acpr_clk.rho_effyy*cos(alphap) - acpr_clk.rho_effxy*sin(alphap))
  pg28: PlotGroup2D "Cloak ide rhoyy" on domains 3, 4 | data = tran1
    surf1: Surface
      expr = cos(alphap)*(acpr_clk.rho_effyy*cos(alphap) - acpr_clk.rho_effxy*sin(alphap)) - sin(alphap)*(acpr_clk.rho_effyx*cos(alphap) - acpr_clk.rho_effxx*sin(alphap))
  pg29: PlotGroup2D "Cloak ide k" on domains 3, 4 | data = tran1
    surf1: Surface | expr = acpr_clk.K_eff; descr = Effective bulk modulus
  pg41: PlotGroup2D "Cloaked ide pressure" | data = dset10; title = f = eval(acpr_und.freq) Hz
    surf1: Surface | expr = abs(acpr_clk.p_t)
    con1: Contour (disabled) | expr = acpr_clk.p_t
  pg43: PlotGroup2D "Cloaked clk pressure" | data = dset7; title = f = eval(acpr_und.freq) Hz
    surf1: Surface | expr = abs(acpr_clk.p_t)
    con1: Contour (disabled) | expr = acpr_clk.p_t
  pg42: PlotGroup2D "Cloaked und pressure" | data = dset5; title = f = eval(acpr_und.freq) Hz
    surf1: Surface | expr = abs(acpr_und.p_t)
    con1: Contour (disabled) | expr = acpr_clk.p_t
  pg21: PlotGroup2D "MAC" | data = dset1
  pg22: PlotGroup1D "Dispersion real" | data = none; title = Real part
    glob1: Global
      data = dset5
      expr = acpr_und.freq
      unit = Hz
      descr = Und
      xdata = expr
      xdataexpr = k
      functype = discrete
    glob2: Global
      data = dset7
      expr = acpr_clk.freq
      unit = Hz
      descr = clk
      xdata = expr
      xdataexpr = k
      functype = discrete
  pg25: PlotGroup1D "Dispersion imag" | data = none; title = Imaginary part
    glob1: Global
      data = dset5
      expr = imag(acpr_und.freq)
      unit = Hz
      descr = Und
      xdata = expr
      xdataexpr = k
      functype = discrete
    glob2: Global
      data = dset7
      expr = imag(acpr_clk.freq)
      unit = Hz
      descr = clk
      xdata = expr
      xdataexpr = k
      functype = discrete
  pg30: PlotGroup2D "Acoustic Pressure (acpr_und)" | data = dset8
    surf1: Surface | expr = acpr_und.p_t
  pg31: PlotGroup2D "Sound Pressure Level (acpr_und)" | data = dset8
    surf1: Surface | expr = acpr_und.Lp_t
  pg32: PlotGroup2D "Acoustic Pressure (acpr_clk)" | data = dset8
    surf1: Surface | expr = acpr_clk.p_t
    con1: Contour | expr = acpr_clk.p_t
  pg33: PlotGroup2D "Sound Pressure Level (acpr_clk)" | data = dset8
    surf1: Surface | expr = acpr_clk.Lp_t
  pg34: PlotGroup2D "Acoustic Pressure (acpr_dis)" | data = dset8
    surf1: Surface | expr = acpr_dis.p_t
    con1: Contour | expr = acpr_dis.p_t
  pg35: PlotGroup2D "Sound Pressure Level (acpr_dis)" | data = dset8
    surf1: Surface | expr = acpr_dis.Lp_t

Exports
  data1: Data | data = dset5